*Heading
** Job name: IDL_2D_1M_ALPHA_DYN Model name: IDL_2D_1M_ALPHA_DYN
** Generated by: Abaqus/CAE 2020
*Preprint, echo=NO, model=NO, history=NO, contact=NO
**
** PARTS
**
*Part, name=DAM
*End Part
**
*Part, name=WATER
*End Part
**
**
* PARAMETER
ALPHA_DYN=100
** ASSEMBLY
**
*Assembly, name=Assembly
**
*Instance, name=DAM-1, part=DAM
   -0.574625,           0.,           0.
*Node
      1,           0.,           0.
      2, 0.0638471916,           0.
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*Element, type=CPS6M
  1,   1,   2,  11, 211, 212, 213
  2,   2,  12,  11, 214, 215, 212
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*Nset, nset=DAM_BODY, generate
   1,  779,    1
*Elset, elset=DAM_BODY, generate
   1,  360,    1
** Section: CONCRETE_WEST_C
*Solid Section, elset=DAM_BODY, material=CONCRETE_WEST_C
0.,
*End Instance
**
*Instance, name=WATER-1, part=WATER
   -0.574625,           0.,           0.
*Node
      1,  0.574624717,           1.
      2,  0.574624717,  0.949999988
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*Element, type=AC2D6
   1,    1,    2,   22, 1282, 1283, 1284
   2,    2,   23,   22, 1285, 1286, 1283
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*Nset, nset=Set-1, generate
    1,  4961,     1
*Elset, elset=Set-1, generate
    1,  2400,     1
** Section: WATER_WEST
*Solid Section, elset=Set-1, material=WATER_WEST
0.,
*End Instance
**
*Nset, nset=CREST, instance=DAM-1
 210,
*Nset, nset=DAM_ABUTMENT, instance=DAM-1
   1,   2,   3,   4,   5,   6
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*Elset, elset=DAM_ABUTMENT, instance=DAM-1, generate
  1,  17,   2
*Nset, nset=DAM_BODY, instance=DAM-1, generate
   1,  779,    1
*Elset, elset=DAM_BODY, instance=DAM-1, generate
   1,  360,    1
*Nset, nset=DAM_BOTTOM, instance=DAM-1
 10,
*Nset, nset=DAM_FACE, instance=DAM-1
  10,  20,  30,  40,  50,  60
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*Elset, elset=DAM_FACE, instance=DAM-1, generate
  18,  360,   18
*Nset, nset=WATER_BODY, instance=WATER-1, generate
    1,  4961,     1
*Elset, elset=WATER_BODY, instance=WATER-1, generate
    1,  2400,     1
*Nset, nset=WATER_BOTTOM, instance=WATER-1
 21,
*Nset, nset=WATER_FACE, instance=WATER-1
    1,    2,    3,    4,    5,    6
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*Elset, elset=WATER_FACE, instance=WATER-1, generate
  1,  39,   2
*Nset, nset=WATER_ZERO, instance=WATER-1
    1,   22,   43,   64,   85,  106
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*Elset, elset=WATER_ZERO, instance=WATER-1, generate
    1,  2361,    40
*Elset, elset=_DAM_FACE_S1, internal, instance=DAM-1, generate
  18,  360,   18
*Surface, type=ELEMENT, name=DAM_FACE
_DAM_FACE_S1, S1
*Elset, elset=_DOWN_FACE_S3, internal, instance=DAM-1, generate
   1,  343,   18
*Surface, type=ELEMENT, name=DOWN_FACE
_DOWN_FACE_S3, S3
*Elset, elset=_WATER_BOTTOM_S1, internal, instance=WATER-1, generate
   40,  2400,    40
*Surface, type=ELEMENT, name=WATER_BOTTOM
_WATER_BOTTOM_S1, S1
*Elset, elset=_WATER_FACE_S1, internal, instance=WATER-1, generate
  1,  39,   2
*Surface, type=ELEMENT, name=WATER_FACE
_WATER_FACE_S1, S1
*Elset, elset=_WATER_INFINITE_S2, internal, instance=WATER-1, generate
 2362,  2400,     2
*Surface, type=ELEMENT, name=WATER_INFINITE
_WATER_INFINITE_S2, S2
** Constraint: DAM_WATER
*Tie, name=DAM_WATER, adjust=yes, position tolerance=0.01, type=SURFACE TO SURFACE
WATER_FACE, DAM_FACE
**
** INTEGRATED OUTPUT SECTIONS
**
*Integrated Output Section, name=DAM_FACE, surface=DAM_FACE, project orientation=NO
*End Assembly
*Amplitude, name=CONSTANT, definition=PERIODIC
1, 6.28318530717959,              0.,              1.
             0.,              0.
*Amplitude, name="IDL_1M_0,75", definition=PERIODIC
1,         1583.36,              0.,              0.
             1.,              0.
*Amplitude, name=TEMP, definition=PERIODIC
1, 229.336263712055,              0.,              0.
             1.,              0.
*Amplitude, name=U(A)
            0.5,    -0.101321184,           0.502,    -0.100515452,           0.504,    -0.099719293,           0.506,    -0.098932556
          0.508,    -0.098155093,            0.51,    -0.097386759,           0.512,    -0.096627411,           0.514,    -0.095876909
          0.516,    -0.095135118,           0.518,    -0.094401902,            0.52,     -0.09367713,           0.522,    -0.092960673
          0.524,    -0.092252403,           0.526,    -0.091552198,           0.528,    -0.090859934,            0.53,    -0.090175493
          0.532,    -0.089498756,           0.534,    -0.088829609,           0.536,    -0.088167938,           0.538,    -0.087513633
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         14.996,    -0.000112639,          14.998,    -0.000112609,             15.,    -0.000112579
*Amplitude, name=U(A)_1
          0.335,    -0.225709921,            0.34,    -0.219120207,           0.345,     -0.21281492,            0.35,    -0.206777926
          0.355,    -0.200994215,            0.36,    -0.195449814,           0.365,    -0.190131701,            0.37,    -0.185027728
          0.375,    -0.180126549,            0.38,    -0.175417562,           0.385,    -0.170890848,            0.39,     -0.16653712
          0.395,    -0.162347674,             0.4,    -0.158314349,           0.405,    -0.154429483,            0.41,    -0.150685877
          0.415,    -0.147076765,            0.42,    -0.143595782,           0.425,    -0.140236932,            0.43,     -0.13699457
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         29.555,    -2.89987e-05,           29.56,    -2.89889e-05,          29.565,    -2.89791e-05,           29.57,    -2.89693e-05
*Amplitude, name=U(A)_1_1
            50.,    -1.01321e-05,             60.,    -7.03619e-06,             70.,    -5.16945e-06,             80.,    -3.95786e-06
            90.,     -3.1272e-06,            100.,    -2.53303e-06,            110.,    -2.09341e-06,            120.,    -1.75905e-06
           130.,    -1.49883e-06,            140.,    -1.29236e-06,            150.,    -1.12579e-06,            160.,    -9.89465e-07
           170.,    -8.76481e-07,            180.,    -7.81799e-07,            190.,     -7.0167e-07,            200.,    -6.33257e-07
           210.,    -5.74383e-07,            220.,    -5.23353e-07,            230.,    -4.78834e-07,            240.,    -4.39762e-07
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         58490.,    -7.40418e-12,          58500.,    -7.40165e-12,          58510.,    -7.39912e-12,          58520.,    -7.39659e-12
*Amplitude, name=UNIT, definition=PERIODIC
1,         6.28319,              0.,              0.
             1.,              0.
*Amplitude, name=WESTERGAARD, definition=PERIODIC
1, 4.71238898038469,              0.,              0.
             1.,              0.
**
** MATERIALS
**
*Material, name=CONCRETE_CLASSIC
*Density
2500.,
*Elastic
 3.5e+10, 0.22
*Material, name=CONCRETE_WEST
*Density
 2301.65,
*Elastic
 1.37895e+10, 0.22
*Material, name=CONCRETE_WEST_C
*Damping, alpha=1.17663, beta=0.000781894
*Density
 2301.65,
*Elastic
 1.37895e+10, 0.22
*Material, name=CONCRETE_WEST_IDL_C20
*Damping, alpha=1.01835, beta=0.00093091
*Density
 2301.65,
*Elastic
 1.37895e+10, 0.22
*Material, name=CONCRETE_WEST_RIGID
*Damping, alpha=0.387356, beta=0.00158185
*Density
1.,
*Elastic
 9e+27, 0.22
*Material, name=Concrete_5_5m_Lumiei_2D
*Damping, alpha=0.387356, beta=0.00158185
*Density
2500.,
*Elastic
 3.5e+10, 0.22
*Material, name=Concrete_5_10m_Lumiei_2D
*Damping, alpha=0.406529, beta=0.000466128
*Density
2500.,
*Elastic
 3.5e+10, 0.22
*Material, name=Concrete_5_30m_Lumiei_2D
*Damping, alpha=0.412351, beta=0.000127374
*Density
2500.,
*Elastic
 3.5e+10, 0.22
*Material, name=ROCK_ML
*Density
0.,
*Elastic
 3.5e+10, 0.22
*Material, name=WATER
*Acoustic Medium
 2.15e+09,
*Density
1000.,
*Material, name=WATER_WEST
*Acoustic Medium
 2.06843e+09,
*Density
1000.,
**
** BOUNDARY CONDITIONS
**
** Name: ENCASTRE Type: Symmetry/Antisymmetry/Encastre
*Boundary
DAM_BODY, ENCASTRE
** Name: WATER_ZERO Type: Acoustic pressure
*Boundary
WATER_ZERO, 8, 8
** ----------------------------------------------------------------
**
** STEP: HARMONIC
**
*Step, name=HARMONIC, nlgeom=NO, inc=100000
*Dynamic,alpha=<ALPHA_DYN>,application=TRANSIENT FIDELITY
1e-05,3.,1e-05,0.007
**
** BOUNDARY CONDITIONS
**
** Name: ENCASTRE Type: Symmetry/Antisymmetry/Encastre
*Boundary, op=NEW
** Name: HARMONIC Type: Acceleration/Angular acceleration
*Boundary, op=NEW, amplitude=UNIT, type=ACCELERATION
DAM-1.DAM_BODY, 1, 1, 0.981
DAM-1.DAM_BODY, 2, 2
** Name: WATER_ZERO Type: Acoustic pressure
*Boundary, op=NEW
WATER_ZERO, 8, 8
**
** INTERACTIONS
**
** Interaction: INFINITE_HARMONIC
*Simpedance, nonreflecting=PLANAR
WATER_INFINITE
**
** OUTPUT REQUESTS
**
*Restart, write, frequency=0
**
** FIELD OUTPUT: DAM_BODY
**
*Output, field, frequency=1
*Node Output, nset=DAM_BODY
U,
*Element Output, elset=DAM_BODY, directions=YES
S,
**
** FIELD OUTPUT: DAM_FACE
**
*Element Output, elset=DAM_FACE, directions=YES
NFORC, P, SF
**
** FIELD OUTPUT: WATER_BODY
**
*Node Output, nset=WATER_BODY
POR,
**
** HISTORY OUTPUT: DAM_FACE_IS
**
*Output, history, frequency=1
*Integrated Output, section=DAM_FACE
SOF, SOM
**
** HISTORY OUTPUT: CREST
**
*Node Output, nset=CREST
AT, UT
**
** HISTORY OUTPUT: DAM_BOTTOM
**
*Node Output, nset=DAM_BOTTOM
AT, UT
**
** HISTORY OUTPUT: WATER_BOTTOM
**
*Node Output, nset=WATER_BOTTOM
POR,
**
** HISTORY OUTPUT: WATER_FACE
**
*Node Output, nset=WATER_FACE
POR,
*End Step
